A2 := [
    4, 1, 6, 4, 7, 5;
    1, 13, 6, 5, 9, 9;
    6, 6, 29, 3, 4, 11;
    4, 5, 3, 33, 1, 6;
    7, 9, 4, 1, 50, 20;
    5, 9, 11, 6, 20, 50
]
A1 := [4, 1, 6, 4, 7; 1, 13, 6, 5, 9; 6, 6, 29, 3, 4; 4, 5, 3, 33, 1; 7, 9, 4, 1, 50]
L1 := cholesky(A1)
L2 := cholesky(A2)
L1 = [
    2, 0, 0, 0, 0;
    0.5, 3.57071, 0, 0, 0;
    3, 1.26025, 4.29089, 0, 0;
    2, 1.12022, -1.02817, 5.16604, 0;
    3.5, 2.03041, -2.11117, -2.02189, 5.00823
]
L2 = [
    2, 0, 0, 0, 0, 0;
    0.5, 3.57071, 0, 0, 0, 0;
    3, 1.26025, 4.29089, 0, 0, 0;
    2, 1.12022, -1.02817, 5.16604, 0, 0;
    3.5, 2.03041, -2.11117, -2.02189, 5.00823, 0;
    2.5, 2.17043, 0.178216, -0.241604, 1.34397, 6.09449
]
L1*transpose(L1) = [4, 1, 6, 4, 7; 1, 13, 6, 5, 9; 6, 6, 29, 3, 4; 4, 5, 3, 33, 1; 7, 9, 4, 1, 50]
L2*transpose(L2) = [
    4, 1, 6, 4, 7, 5;
    1, 13, 6, 5, 9, 9;
    6, 6, 29, 3, 4, 11;
    4, 5, 3, 33, 1, 6;
    7, 9, 4, 1, 50, 20;
    5, 9, 11, 6, 20, 50
]
